*Heading
** Job name: Test_1 Model name: Model-1
** Generated by: Abaqus/CAE Student Edition 2017
*Preprint, echo=NO, model=NO, history=NO, contact=NO
**
** PARTS
**
*Part, name=Part-1
*End Part
**
**
** ASSEMBLY
**
*Assembly, name=Assembly
**
*Instance, name=Part-1-1, part=Part-1
*Node
     1,  -90,  -15
     2,  90,  -15
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*Element, type=B21
     1,  141,  5
     2,  415,  187
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*Nset, nset=Set-1
1,
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
*Elset, elset=Set-1
1,
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
** Section: Section-1  Profile: Profile-1
*Beam Section, elset=Set-1, material = PLA, temperature=GRADIENTS, section=RECT
0.4, 20
0.,0.,-1.
*End Instance
**
*Nset, nset=Set-2, instance=Part-1-1
8,
7,

*Nset, nset=Set-3, instance=Part-1-1
5,
*Nset, nset=Set-4, instance=Part-1-1
6,
*End Assembly
**
** MATERIALS
**
*Material, name = PLA
*Elastic
2.1e+03, 0.35
** ----------------------------------------------------------------
**
** STEP: Step-1
**
*Step, name=Step-1, nlgeom=NO, perturbation
*Static
**
** BOUNDARY CONDITIONS
**
** Name: BC-1 Type: Displacement/Rotation
*Boundary
Set-3, 1, 1
Set-3, 2, 2
** Name: BC-2 Type: Displacement/Rotation
*Boundary
Set-4, 2, 2
**
** LOADS
**
** Name: Load-1   Type: Node load
*Cload
Set-2, 2, -2.5e+02,
**
** OUTPUT REQUESTS
**
**
** FIELD OUTPUT: F-Output-1
**
*Output, field
*Node Output
RF, U
*Element Output, directions=YES
E, S
**
** HISTORY OUTPUT: H-Output-1
**
*Output, history, variable=PRESELECT
*End Step
